OpenVSP model (file version 5), 4 components.
Geometry view with OpenVSP parameter names; values to 6 digits, angles in degrees, lengths in the model's unit.
Overall bounding box: X_Min=0 X_Len=27.5 Y_Min=-27.9459 Y_Len=55.8917 Z_Min=-1.25442 Z_Len=7.45442

Fuselage "Fuselage"
  location (X Y Z) 0 0 0, rotation 0 0 0
  bounding box size 27.5 2.51877 3.61234
  Design: Length=27.5
  cross sections:
    n  XLocPercent  YLocPercent  ZLocPercent  shape
    0  0            0            0            point
    1  0.25         0            0.022        ellipse Ellipse_Height=3.3 Ellipse_Width=2.5
    2  0.385246     0            0.023        ellipse Ellipse_Height=2.6 Ellipse_Width=1.88776
    3  0.489401     0            0.025        ellipse Ellipse_Height=1.3 Ellipse_Width=0.9
    4  0.95         0            0.02         ellipse Ellipse_Height=0.8 Ellipse_Width=0.8
    5  1            0            0.02         ellipse Ellipse_Height=0 Ellipse_Width=0

Wing "Wing"
  location (X Y Z) 6.6 0 1, rotation 0 0 0
  symmetric about XZ
  bounding box size 4 55.8917 4.00736
  totals: TotalSpan=60 TotalProjectedSpan=55.8917 TotalChord=2.63333 TotalArea=181.7 TotalAR=17.1925
  root: chord 4, twist 0, NACA 4-series Camber=0 CamberLoc=0.2 ThickChord=0.1
  sections:
    n  Span  Root_Chord  Tip_Chord  Area    Sweep  Sweep_Location  Dihedral  Twist  Twist_Location  tip airfoil
    1  16    4           3          56      2.5    0               0         0      0.25            as above
    2  11.5  3           2.3        30.475  2      0               6.5       0      0.25            as above
    3  2.5   2.3         1.2        4.375   28     0               78        0      0.25            as above

Wing "HorizontalTail"
  location (X Y Z) 21.1 0 0.5, rotation 0 0 0
  symmetric about XZ
  bounding box size 2.6 10.563 0.480104
  totals: TotalSpan=10.7238 TotalProjectedSpan=10.563 TotalChord=1.6 TotalArea=20.4876 TotalAR=5.44611
  root: chord 2.6, twist 0, NACA 4-series Camber=0 CamberLoc=0.2 DeltaX=0.833871 ThickChord=0.1
  sections:
    n  Span     Root_Chord  Tip_Chord  Area     Sweep    Sweep_Location  Dihedral  Twist  Twist_Location  tip airfoil
    1  4.76191  2.6         1.4        9.52381  31.9286  0               0         0      0.25            NACA 4-series Camber=0 CamberLoc=0.2 DeltaX=-0.2 ThickChord=0.1
    2  0.6      1.4         1          0.72     0        0               30        0      0.25            NACA 4-series Camber=0 CamberLoc=0.2 ThickChord=0.1

Wing "VerticalTail"
  location (X Y Z) 22.2 0 0.6, rotation 90 0 0
  bounding box size 4.6 0.460267 5.6
  totals: TotalSpan=5.6 TotalProjectedSpan=5.6 TotalChord=2.7 TotalArea=18.72 TotalAR=1.67521
  root: chord 4.6, twist 0, NACA 4-series Camber=0 CamberLoc=0.2 ThickChord=0.1
  sections:
    n  Span  Root_Chord  Tip_Chord  Area   Sweep    Sweep_Location  Dihedral  Twist  Twist_Location  tip airfoil
    1  4.8   4.6         2.6        17.28  20.163   0               0         0      0.25            as above
    2  0.8   2.6         1          1.44   59.7666  0               0         0      0.25            as above
